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/batch
! ANSYS input file written by Workbench version 2022 R2
! File used for geometry attach: F:\БПЛА_Сколтех\Ansys_Skoltech_UAV.x_t
/title,wbnew--Static Structural (A5)
/COM,/COM,     ANSYSMotion, 2022.2
/com,--- Data in consistent MKS units. See Solving Units in the help system for more information.
/units,MKS
/prep7
! Turn off shape checking because checks already performed inside WB mesher.
! See help system for more information.
SHPP,OFF,,NOWARN
etcon,set             ! allow ANSYS to choose best KEYOP's for 180x elements, resets any applicable keyopt to MAPDL defaults
/com,*********** Nodes for the whole assembly ***********
nblock,3,,15077
(1i9,3e20.9e3)
        1     6.846062078E-03    -8.075299235E-02    -7.395798621E-02
        2    -6.747334867E-03    -8.082561974E-02    -7.382507195E-02
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-1
/com,*********** Elements for Body 1 "Part 1" ***********
et,1,187
eblock,19,solid,,6693
(19i9)
        1        1        1        1        0        0        0        0       10        0        1      219      447     2034     2369     4312     5867     4316     4318
     5868    12924
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-1
/com,*********** Send User Defined Coordinate System(s) ***********
csys,0
toffst,273.15,  ! Temperature offset from absolute zero
/com,*********** Set Reference Temperature ***********
tref,22.
/com,*********** Send Materials ***********
Temperature = 'TEMP' ! Temperature
MP,DENS,1,1030,	! kg m^-3
MP,EX,1,1628000000,	! Pa
MP,NUXY,1,0.4089,
MP,ALPX,1,0.000184,	! C^-1
MP,KXX,1,0.1997,	! W m^-1 C^-1
MP,C,1,1400,	! J kg^-1 C^-1

!************************* Model Summary ********************
!Part 1,	Plastic, ABS (high-impact),	matid,	1
!************************* End Model Summary ********************
/com,******* Constant Zero Displacement X *******
CMBLOCK,_DISPZEROUX,NODE,      315
(8i10)
       107       108       109       110       111       112       113       114
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cmsel,s,_DISPZEROUX
d,all,ux,0
nsel,all
/com,******* Constant Zero Displacement Y *******
CMBLOCK,_DISPZEROUY,NODE,      315
(8i10)
       107       108       109       110       111       112       113       114
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cmsel,s,_DISPZEROUY
d,all,uy,0
nsel,all
/com,******* Constant Zero Displacement Z *******
CMBLOCK,_DISPZEROUZ,NODE,      315
(8i10)
       107       108       109       110       111       112       113       114
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cmsel,s,_DISPZEROUZ
d,all,uz,0
nsel,all
/com,*********** Define Force Using Surface Effect Elements ***********
local,12,0,0.,0.,0.,0.,0.,0.
csys,0
et,2,154
eblock,10,,,5
(15i9)
    10998        2        2        2       12      406      586     1034     1034     5640     6853     1034     5641
    10999        2        2        2       12       78     1034      587      587     3078     6857      587     3075
    11000        2        2        2       12       78      587      588      588     3075     6856      588     3076
    11001        2        2        2       12      586      587     1034     1034     6852     6857     1034     6853
    11002        2        2        2       12       78      588      416      416     3076     5706      416     3074
-1
esel,s,type,,2
keyop,2,2,1                ! Apply load in local coordinate system
keyop,2,7,1                ! Use original area so load is constant in large deformation
esel,all
/com,*********** Define Force Using Surface Effect Elements ***********
local,13,0,0.,0.,0.,0.,0.,0.
csys,0
et,3,154
eblock,10,,,5
(15i9)
    11003        3        3        3       13      381     1035      497      497     5480     6212      497     5479
    11004        3        3        3       13       24      486      498      498     2612     6138      498     2613
    11005        3        3        3       13       24      498     1035     1035     2613     6215     1035     2615
    11006        3        3        3       13       24      372      486      486     2611     5413      486     2612
    11007        3        3        3       13      497     1035      498      498     6212     6215      498     6211
-1
esel,s,type,,3
keyop,3,2,1                ! Apply load in local coordinate system
keyop,3,7,1                ! Use original area so load is constant in large deformation
esel,all
/com,*********** Define Force Using Surface Effect Elements ***********
local,14,0,0.,0.,0.,0.,0.,0.
csys,0
et,4,154
eblock,10,,,11
(15i9)
    11008        4        4        4       14     1036       77     1663     1663     3065     3066     1663     9467
    11009        4        4        4       14      400     1663       77       77     5599     3066       77     3064
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-1
esel,s,type,,4
keyop,4,2,1                ! Apply load in local coordinate system
keyop,4,7,1                ! Use original area so load is constant in large deformation
esel,all
/com,*********** Define Force Using Surface Effect Elements ***********
local,15,0,0.,0.,0.,0.,0.,0.
csys,0
et,5,154
eblock,10,,,11
(15i9)
    11019        5        5        5       15      509      508     1666     1666     6288     6291     1666     6296
    11020        5        5        5       15      508      510     1666     1666     6289     6303     1666     6291
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-1
esel,s,type,,5
keyop,5,2,1                ! Apply load in local coordinate system
keyop,5,7,1                ! Use original area so load is constant in large deformation
esel,all
fini
/com,****************************************************************************
/com,*************************    SOLUTION       ********************************
/com,****************************************************************************
/solu
antype,0                   ! static analysis
_thickRatio=  0     ! Ratio of thick parts in the model
eqsl,sparse,,,,,1
cntr,print,1               ! print out contact info and also make no initial contact an error
dmpoption,emat,no             ! Don't combine emat file for DANSYS
dmpoption,esav,no             ! Don't combine esav file for DANSYS
nldiag,cont,iter           ! print out contact info each equilibrium iteration
rescontrol,,none                 ! Do not keep any restart files
/com,****************************************************
/com,******************* SOLVE FOR LS 1 OF 1 ****************
esel,s,type,,2
nsle
sfe,all,1,pres,1,2036.45238616413
sfe,all,2,pres,1,-1770.08621826655
sfe,all,3,pres,1,4119.46096210149
esel,s,type,,3
nsle
sfe,all,1,pres,1,2036.54790368737
sfe,all,2,pres,1,-1770.16924218238
sfe,all,3,pres,1,-4119.65418081402
esel,s,type,,4
nsle
sfe,all,1,pres,1,-1501.09673133903
sfe,all,2,pres,1,-1447.45968851933
sfe,all,3,pres,1,2808.42571276758
esel,s,type,,5
nsle
sfe,all,1,pres,1,-1499.62565974142
sfe,all,2,pres,1,-1449.56631592884
sfe,all,3,pres,1,-2807.43181467131
nsel,all
esel,all
nsub,1,1,1
time,1.
outres,erase
outres,all,none
outres,nsol,all,
outres,rsol,all
outres,eangl,all
outres,etmp,all
outres,veng,all
outres,strs,all,
outres,epel,all,
outres,eppl,all,
outres,cont,all,
! *********** WB SOLVE COMMAND ***********
! check interactive state
*get,ANSINTER_,active,,int
*if,ANSINTER_,ne,0,then
/eof
*endif
solve
/com *************** Write FE CONNECTORS *********
CEWRITE,file,ce,,INTE
/com,****************************************************
/com,*************** FINISHED SOLVE FOR LS 1 *************
*get,_NSOLTHREADS,active,0,ntfs
*get,_NSOLPROCESSES,active,0,npfs
/post1
fini
